*Heading
 Job for Model
** Job name: 100 Model name: MODEL100
** Generated by: Abaqus/CAE 2020
*Preprint, echo=NO, model=NO, history=NO, contact=NO
**
** PARTS
**
*Part, name=PART100
*Node
      1,   63.6059608,   53.4709435,           4.
      2,   67.1007919,   53.4709435,           4.
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*Element, type=C3D8R
   1,  5251,     2,  1549,  4641, 11386,  6137,  7684, 10776
   2,  5251,   658,  3876,  5250, 11386,  6793, 10011, 11385
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*Nset, nset=_PickedSet239, internal, generate
     1,  12270,      1
*Elset, elset=_PickedSet239, internal, generate
    1,  5772,     1
** Section: SteelSection
*Solid Section, elset=_PickedSet239, material=Steel
,
*End Part
**
**
** ASSEMBLY
**
*Assembly, name=Assembly
**
*Instance, name=ASSEMBLY100, part=PART100
*End Instance
**
*Node
      1,   67.1007919,   134.201584,           2.
*Node
      2,   67.1007919,           0.,           2.
*Nset, nset=BottomNodes, instance=ASSEMBLY100
  150,  151,  152,  153,  154,  155
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*Nset, nset=IntermediateNodes, instance=ASSEMBLY100
     1,     2,     3,     4,     5,     6
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*Nset, nset=RP_Bottom
 2,
*Nset, nset=RP_Top
 1,
*Nset, nset=TopNodes, instance=ASSEMBLY100
  440,  441,  442,  443,  444,  445
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*Nset, nset=_PickedSet7, internal
 1,
*Nset, nset=_PickedSet8, internal
 2,
*Surface, type=NODE, name=BottomNodes_CNS_, internal
BottomNodes, 1.
*Surface, type=NODE, name=TopNodes_CNS_, internal
TopNodes, 1.
** Constraint: BottomCoupling
*Coupling, constraint name=BottomCoupling, ref node=_PickedSet8, surface=BottomNodes_CNS_
*Kinematic
** Constraint: TopCoupling
*Coupling, constraint name=TopCoupling, ref node=_PickedSet7, surface=TopNodes_CNS_
*Kinematic
*End Assembly
*Amplitude, name=LoadAmplitude
             0.,              0.,              1.,              4.,              2.,              0.,              3.,             -4.
             4.,              0.
**
** MATERIALS
**
*Material, name=Steel
*Elastic
210000., 0.3
*Plastic
235.,0.
**
** BOUNDARY CONDITIONS
**
** Name: FixBottomRP Type: 位移/转角
*Boundary
RP_Bottom, 1, 1
RP_Bottom, 2, 2
RP_Bottom, 3, 3
RP_Bottom, 4, 4
RP_Bottom, 5, 5
RP_Bottom, 6, 6
** Name: RestrictZIntermediateNodes Type: 位移/转角
*Boundary
IntermediateNodes, 3, 3
IntermediateNodes, 4, 4
IntermediateNodes, 5, 5
** ----------------------------------------------------------------
**
** STEP: Step1
**
*Step, name=Step1, nlgeom=YES, inc=500
Step to apply x-direction load on RP_Top
*Static
0.01, 4., 1e-10, 0.1
**
** BOUNDARY CONDITIONS
**
** Name: LoadTopRP Type: 位移/转角
*Boundary, amplitude=LoadAmplitude
RP_Top, 1, 1, 1.
RP_Top, 2, 2
RP_Top, 3, 3
RP_Top, 4, 4
RP_Top, 5, 5
RP_Top, 6, 6
**
** OUTPUT REQUESTS
**
*Restart, write, frequency=0
**
** FIELD OUTPUT: MisesAndDisplacement
**
*Output, field, time interval=1.
*Node Output
U,
*Element Output, directions=YES
S,
**
** FIELD OUTPUT: RP_Top_Output
**
*Output, field, number interval=64
*Node Output, nset=RP_Top
RF, U
*Output, history, frequency=0
*End Step
